Wed 31 Mar 2021 01:42:58 PM CEST
;; 1. Based on: 0026
;; 2. Description: FIX RKI Modell (Ges.Dtl), open IIVs, 17 Effects RKI/MP
;; x1. Author: dings

;; 3. Label:

$SIZES NO=5000 PD=-100 LVR=50

$PROBLEM COVID-19 cases

$INPUT ID TIME DROP Landkreis=DROP IdLandkreis Bundesland=DROP ID_BL=DROP DV AMT MDV CMT Week OBS EWZ DV_CASE0 SCHOOLS STORECLOSURE CURFEW RESTRAININGORDER CARNIVAL day=DROP MDVWKND=DROP fixR0_0 fixR0_1 fixR0_2 fixR0_3 fixR0_4 fixR0_5 fixR0_6 fixR0_7 fixR0_8 fixR0_9 fixR0_10 fixR0_11 fixR0_12 fixR0_13 fixR0_14 fixR0_15 fixR0_16 fixR0_17 fixR0_18 fixR0_19 fixR0_20 fixR0_21=DROP fixR0_22=DROP fixR0_23=DROP fixR0_24=DROP fixR0_25=DROP fixCP_4 fixCP_5 fixCP_6 fixCP_7 fixCP_8 fixCP_9 fixCP_10 fixCP_11 fixCP_12 fixCP_13 fixCP_14 fixCP_15 fixCP_16 fixCP_17 fixCP_18 fixCP_19 fixCP_20 fixCP_21=DROP fixCP_22=DROP fixCP_23=DROP fixCP_24=DROP fixCP_25=DROP fixF2 PREDIC
$DATA Landkreise_V4_2021_03_31_R0_0048.csv IGNORE=@ IGNORE(PREDIC.EQ.1) IGNORE(CMT.GT.3)
$SUBROUTINES ADVAN13 TOL=6
$MODEL NCOMPS=3

$PK
NUMBER = EWZ
Q_0 = 0
;;;;Metakis-Information;;;;;
P_KH = 0.801 ;Prozent Normalstation
P_ICU = 0.252 ;Prozent ICU vs BEAT
P_BEAT_D = 0.514;Sterberate Beatmet
P_ICU_D = 0.204 ;Sterberate ICU
P_KH_D = 0.155 ;Sterberate KH
LD_BEAT_D = 13 ;Liegedauer Beatmet verstorben
LD_BEAT_L = 35;Liegedauer Beatmet entlassen
LD_ICU_D = 13;Liegedauer ICU verstorben
LD_ICU_L = 19;Liegedauer ICU entlassen
LD_KH_D = 8.8;Liegedauer KH verstorben
LD_KH_L = 12;Liegedauer KH entlassen
P_BEAT_AUFENTHALT_D = 0.76;Beatmung % Aufenthalt verstorben
P_BEAT_AUFENTHALT_L = 0.49;Beatmung % Aufenthalt entlassen
P_BEAT_on_ICU_AUFENTHALT_D = 0.88;beatmet ICU % Aufenthalt verstorben
P_BEAT_on_ICU_AUFENTHALT_L =  0.75;beatmet ICU % Aufenthalt entlassen
P_ICU_AUFENTHALT_D = 0.57;unbeatmet ICU % Aufenthalt verstorben
P_ICU_AUFENTHALT_L = 0.34;unbeatmet ICU % Aufenthalt entlassen

R0START = fixR0_0

COV1 = SCHOOLS
E1 = fixR0_1
COV2 = CARNIVAL
E2 = fixR0_2
COV3 = MAX(CURFEW,RESTRAININGORDER)
E3 = fixR0_3
MTDIFF = 1
MTIME(1) = fixCP_4
COV4 = MPAST(1)
E4 = fixR0_4
MTIME(2) = fixCP_5
COV5 = MPAST(2)
E5 = fixR0_5
MTIME(3) = fixCP_6
COV6 = MPAST(3)
E6 = fixR0_6
MTIME(4) = fixCP_7
COV7 = MPAST(4)
E7 = fixR0_7
MTIME(5) = fixCP_8
COV8 = MPAST(5)
E8 = fixR0_8
MTIME(7) = fixCP_9
COV9 = MPAST(7)
E9 = fixR0_9
MTIME(8) = fixCP_10
COV10 = MPAST(8)
E10 = fixR0_10
MTIME(9) = fixCP_11
COV11 = MPAST(9)
E11 =fixR0_11

MTIME(10) = MTIME(9)+THETA(1)
COV12 = MPAST(10)
E12 = THETA(2)*EXP(ETA(1))

MTIME(11) = MTIME(10)+THETA(3)
COV13 = MPAST(11)
E13 = THETA(4)*EXP(ETA(2))

MTIME(12) = MTIME(11)+THETA(5)
COV14 = MPAST(12)
E14 = THETA(6)*EXP(ETA(3))

MTIME(13) = MTIME(12)+THETA(7)
COV15 = MPAST(13)
E15 = THETA(8)*EXP(ETA(4))

MTIME(14) = MTIME(13)+THETA(9)
COV16 = MPAST(14)
E16 = THETA(10)*EXP(ETA(5))

MTIME(15) = MTIME(14)+THETA(11)
COV17 = MPAST(15)
E17 = THETA(12)*EXP(ETA(6))

MTIME(16) = MTIME(15)+THETA(13)
COV18 = MPAST(16)
E18 = THETA(14)*EXP(ETA(7))

MTIME(17) = MTIME(16)+THETA(15)
COV19 = MPAST(17)
E19 = THETA(16)*EXP(ETA(8))

MTIME(18) = MTIME(17)+THETA(17)
COV20 = MPAST(18)
E20 = THETA(18)*EXP(ETA(9))

MTIME(19) = MTIME(18)+THETA(19)
COV21 = MPAST(19)
E21 = THETA(20)*EXP(ETA(10))

MTIME(20) = MTIME(19)+THETA(21)
COV22 = MPAST(20)
E22 = THETA(22)*EXP(ETA(11))

MTIME(21) = MTIME(20)+THETA(23)
COV23 = MPAST(21)
E23 = THETA(24)*EXP(ETA(12))
MTIME(22) = MTIME(21)+THETA(25)
COV24 = MPAST(22)
E24 = THETA(26)*EXP(ETA(13))
MTIME(23) = THETA(27)
COV25 = MPAST(23)
E25 = THETA(28)*EXP(ETA(14))

R0FREE_OLD = R0START*(1-COV1)+E2*COV2+E1*(COV1-COV3)+E3*(COV3-COV4)+E4*(COV4-COV5)+E5*(COV5-COV6)+E6*(COV6-COV7)+E7*(COV7-COV8)+E8*(COV8-COV9)+E9*(COV9-COV10)+E10*(COV10-COV11)+E11*(COV11-COV12)+E12*(COV12-COV13)+E13*(COV13-COV14)+E14*(COV14-COV15)+E15*(COV15-COV16)+E16*(COV16-COV17)+E17*(COV17-COV18)+E18*(COV18-COV19)+E19*(COV19-COV20)+E20*(COV20-COV21)+E21*(COV21-COV22)+E22*(COV22-COV23)+E23*(COV23-COV24)+E24*(COV24-COV25)+E25*COV25
R0BASE = R0START
R0END = E18
R0_0 = R0START ;Startwert
R0_1 = E1 ;Startwert
R0_2 = E2 ;nach Schulschließung
R0_3 = E3 ;nach Kontaktverbot
R0_4 = E4 ;
CP_4 = MTIME(1)
R0_5 = E5 ;
CP_5 = MTIME(2)
R0_6 = E6 ;
CP_6 = MTIME(3)
R0_7 = E7 ;
CP_7 = MTIME(4)
R0_8 = E8 ;
CP_8 = MTIME(5)
R0_9 = E9 ;
CP_9 = MTIME(7)
R0_10 = E10 ;
CP_10 = MTIME(8)
R0_11 = E11 ;
CP_11 = MTIME(9)
R0_12 = E12 ;
CP_12 = MTIME(10)
R0_13 = E13 ;
CP_13 = MTIME(11)
R0_14 = E14 ;
CP_14 = MTIME(12)
R0_15 = E15 ;
CP_15 = MTIME(13)
R0_16 = E16 ;
CP_16 = MTIME(14)
R0_17 = E17 ;
CP_17 = MTIME(15)
R0_18 = E18 ;
CP_18 = MTIME(16)
R0_19 = E19 ;
CP_19 = MTIME(17)
R0_20 = E20 ;
CP_20 = MTIME(18)
R0_21 = E21 ;
CP_21 = MTIME(19)
R0_22 = E22 ;
CP_22 = MTIME(20)
R0_23 = E23 ;
CP_23 = MTIME(21)
R0_24 = E24 ;
CP_24 = MTIME(22)
R0_25 = E25 ;
CP_25 = MTIME(23)

F2 = fixF2
ALAG2 = 9

isolation = 100
infectious = 7

gamma = 1/(infectious)

MTIME(6) = 1
MTDIFF = 1
REC_TIME = MPAST(6)

A_0(1) = NUMBER
k=0.072
initMutante=0.002
Starttag = 347

$DES
DaysSinceMutante = T-Starttag
IF(T.LT.Starttag) DaysSinceMutante = 0
Mutante = 1/(1+((1-initMutante)/initMutante)*EXP(-k*DaysSinceMutante))
IF(T.LT.Starttag) Mutante = 0
R0FREE = R0FREE_OLD*(1-Mutante)+R0FREE_OLD*1.35*Mutante
beta = R0FREE*gamma

DADT(1) = -beta*A(1)/NUMBER*A(2)
DADT(2) = beta*A(1)/NUMBER*A(2) -  gamma*A(2)
DADT(3) = gamma*A(2)

$ERROR
CASES = A(3)+Q_0
IPRED = CASES
W = IPRED
DEL = 0
IF(IPRED.EQ.0) DEL = 0.001
IRES	= DV -  IPRED
IWRES   = IRES/(W+DEL)
Y  = IPRED *EXP(EPS(1)) + EPS(2)

$THETA
(0, 17.8,30) FIX;1 +MTIME12
(0.5, 1.24,5) FIX;2 EFFECT12
(0, 26.7,30) FIX;3 +MTIME13
(0.5, 1.51,5) FIX;4 EFFECT13
(0, 7.01,10) FIX;5 +MTIME14
(0.5, 1.54,5) FIX;6 EFFECT14
(0, 19.1,30) FIX;7 +MTIME15
(0.5, 1.04,5) FIX;8 EFFECT15
(0, 13.6,30) FIX;9 +MTIME16
(0.5, 0.996,5) FIX;10 EFFECT16
(0, 9.32) FIX;11 +MTIME17
(0.5, 0.933) FIX;12 EFFECT17
(0, 8.21) FIX;13 +MTIME18
(0.5, 1.23) FIX;14 EFFECT18
(0, 19) FIX;15 +MTIME19
(0.5, 0.673) FIX;16 EFFECT19
(0, 10.3) FIX;17 +MTIME20
(0.5, 1.23) FIX;18 EFFECT20
(0, 10.4) FIX;19 +MTIME21
(0.5, 0.775) FIX;20 EFFECT21
(0, 9.59) FIX;21 +MTIME22
(0.5, 0.837) FIX;22 EFFECT22
(0, 11.3) FIX;23 +MTIME23
(0.5, 0.743) FIX;24 EFFECT23
(0, 12) FIX;25 +MTIME24
(0, 0.938) FIX;26 EFFECT24
442 FIX;27 +MTIME24
(0, 0.982) FIX;28 EFFECT24

$OMEGA
 0.0127 FIX;1 EFFECT12
 0.0336 FIX;2 EFFECT13
 0.00247 FIX;3 EFFECT14
 0.00386 FIX;4 EFFECT15
 0.0359 FIX;5 EFFECT16
 0.0232 FIX;6 EFFECT17
 0.004 FIX;7 EFFECT18
 0.0257 FIX;8 EFFECT19
 0.0065 FIX;9 EFFECT20
 0.0114 FIX;10 EFFECT21
 0.0271 FIX;11 EFFECT22
 0.0121 FIX;12 EFFECT23
 0.0038 FIX;13 EFFECT24
 0.0015 FIX;14 EFFECT25

$SIGMA
 0.0037 ;prop c
10 ;add c

$EST METHOD=1 INTER MAXEVAL=9999 NOABORT NSIG=3 SIGL=6 PRINT=1 POSTHOC

$COV UNCONDITIONAL

$TABLE ID TIME DV OBS CMT MDV IPRED IdLandkreis R0_0 R0_1 R0_2 R0_3 R0_4 R0_5 R0_6 R0_7 R0_8 R0_9 R0_10 R0_11 R0_12 R0_13 R0_14 R0_15 R0_16 R0_17 R0_18 R0_19 R0_20 R0_21 R0_22 R0_23 R0_24 R0_25 CP_4 CP_5 CP_6 CP_7 CP_8 CP_9 CP_10 CP_11 CP_12 CP_13 CP_14 CP_15 CP_16 CP_17 CP_18 CP_19 CP_20 CP_21 CP_22 CP_23 CP_24 CP_25 F2 R0FREE R0END ONEHEADER NOPRINT FILE=sdtab0050

NM-TRAN MESSAGES
 WARNINGS AND ERRORS (IF ANY) FOR PROBLEM    1
 (WARNING  2) NM-TRAN INFERS THAT THE DATA ARE POPULATION.
 (WARNING  68) THE INT, MOD, MIN, OR MAX FUNCTION IS BEING USED OUTSIDE OF A
 SIMULATION BLOCK. IF THE FUNCTION VALUE AFFECTS THE VALUE OF THE
 OBJECTIVE FUNCTION, THEN AN ERROR WILL PROBABLY OCCUR.
 (WARNING  48) DES-DEFINED ITEMS ARE COMPUTED ONLY WHEN EVENT TIME
 INCREASES. E.G., DISPLAYED VALUES ASSOCIATED WITH THE FIRST EVENT RECORD
 OF AN INDIVIDUAL RECORD ARE COMPUTED WITH (THE LAST ADVANCE TO) AN EVENT
 TIME OF THE PRIOR INDIVIDUAL RECORD.

1NONLINEAR MIXED EFFECTS MODEL PROGRAM (NONMEM) VERSION 7.4.3
 ORIGINALLY DEVELOPED BY STUART BEAL, LEWIS SHEINER, AND ALISON BOECKMANN
 CURRENT DEVELOPERS ARE ROBERT BAUER, ICON DEVELOPMENT SOLUTIONS,
 AND ALISON BOECKMANN. IMPLEMENTATION, EFFICIENCY, AND STANDARDIZATION
 PERFORMED BY NOUS INFOSYSTEMS.
 PROBLEM NO.:         1
 COVID-19 cases
 TOT. NO. OF OBS RECS:   116913
 TOT. NO. OF INDIVIDUALS:      412
 GENERAL NONLINEAR KINETICS MODEL WITH STIFF/NONSTIFF EQUATIONS (LSODA, ADVAN13)
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 #TBLN:      1
 #METH: First Order Conditional Estimation with Interaction
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
 #TERM:
0MINIMIZATION SUCCESSFUL
 HOWEVER, PROBLEMS OCCURRED WITH THE MINIMIZATION.
 REGARD THE RESULTS OF THE ESTIMATION STEP CAREFULLY, AND ACCEPT THEM ONLY
 AFTER CHECKING THAT THE COVARIANCE STEP PRODUCES REASONABLE OUTPUT.
 NO. OF FUNCTION EVALUATIONS USED:      351
 NO. OF SIG. DIGITS IN FINAL EST.:  3.1

 ETABAR IS THE ARITHMETIC MEAN OF THE ETA-ESTIMATES,
 AND THE P-VALUE IS GIVEN FOR THE NULL HYPOTHESIS THAT THE TRUE MEAN IS 0.

 ETABAR:        -6.5009E-02  5.8988E-02  2.5249E-03 -8.1794E-04 -2.2474E-04  1.2352E-02 -2.8648E-02 -2.7230E-02 -2.5424E-02 -2.2997E-02
                -3.8628E-02  1.1779E-03  1.1711E-02  2.1262E-03
 SE:             1.0041E-02  1.3619E-02  4.8411E-03  6.4894E-03  1.1721E-02  1.0807E-02  4.9372E-03  1.1472E-02  5.7468E-03  6.1137E-03
                 9.6890E-03  6.4693E-03  4.7120E-03  1.6458E-03
 N:                     412         412         412         412         412         412         412         412         412         412
                        412         412         412         412

 P VAL.:         9.5529E-11  1.4844E-05  6.0198E-01  8.9970E-01  9.8470E-01  2.5307E-01  6.5534E-09  1.7616E-02  9.6981E-06  1.6886E-04
                 6.6998E-05  8.5553E-01  1.2943E-02  1.9639E-01

 ETASHRINKSD(%)  1.0000E-10  1.0000E-10  1.0000E-10  1.0000E-10  1.0000E-10  1.0000E-10  1.0000E-10  1.0000E-10  1.0000E-10  1.0000E-10
                 1.0000E-10  1.0000E-10  1.0000E-10  1.3640E+01
 ETASHRINKVR(%)  1.0000E-10  1.0000E-10  1.0000E-10  1.0000E-10  1.0000E-10  1.0000E-10  1.0000E-10  1.0000E-10  1.0000E-10  1.0000E-10
                 1.0000E-10  1.0000E-10  1.0000E-10  2.5420E+01
 EBVSHRINKSD(%)  3.1679E+00  1.7271E+01  1.3428E+01  1.9192E+01  8.4665E+00  1.8302E+01  8.7383E+00  1.8907E+01  2.4509E+01  4.1668E+01
                 1.7538E+01  3.8505E+01  1.2871E+01  5.3423E+01
 EBVSHRINKVR(%)  6.2355E+00  3.1560E+01  2.5052E+01  3.4700E+01  1.6216E+01  3.3254E+01  1.6713E+01  3.4239E+01  4.3011E+01  6.5974E+01
                 3.2000E+01  6.2184E+01  2.4086E+01  7.8306E+01
 EPSSHRINKSD(%)  1.5661E+00  1.5673E+00
 EPSSHRINKVR(%)  3.1077E+00  3.1101E+00


 TOTAL DATA POINTS NORMALLY DISTRIBUTED (N):       116913
 N*LOG(2PI) CONSTANT TO OBJECTIVE FUNCTION:    214871.72146511578
 OBJECTIVE FUNCTION VALUE WITHOUT CONSTANT:    934083.64004500501
 OBJECTIVE FUNCTION VALUE WITH CONSTANT:       1148955.3615101208
 REPORTED OBJECTIVE FUNCTION DOES NOT CONTAIN CONSTANT

 TOTAL EFFECTIVE ETAS (NIND*NETA):                          5768


 #TERE:
 Elapsed estimation  time in seconds:   976.25
 Elapsed covariance  time in seconds:    79.58
 Elapsed postprocess time in seconds:    99.93

 ********************               FIRST ORDER CONDITIONAL ESTIMATION WITH INTERACTION              ********************
 #OBJT:**************                       MINIMUM VALUE OF OBJECTIVE FUNCTION                      ********************
 #OBJV:********************************************   934083.640       **************************************************

 ********************               FIRST ORDER CONDITIONAL ESTIMATION WITH INTERACTION              ********************
 ********************                             FINAL PARAMETER ESTIMATE                           ********************

 THETA - VECTOR OF FIXED EFFECTS PARAMETERS   *********
         TH 1      TH 2      TH 3      TH 4      TH 5      TH 6      TH 7      TH 8      TH 9      TH10      TH11      TH12
          TH13      TH14      TH15      TH16      TH17      TH18      TH19      TH20      TH21      TH22      TH23      TH24
         TH25      TH26      TH27      TH28
         1.78E+01  1.24E+00  2.67E+01  1.51E+00  7.01E+00  1.54E+00  1.91E+01  1.04E+00  1.36E+01  9.96E-01  9.32E+00  9.33E-01
          8.21E+00  1.23E+00  1.90E+01  6.73E-01  1.03E+01  1.23E+00  1.04E+01  7.75E-01  9.59E+00  8.37E-01  1.13E+01  7.43E-01
         1.20E+01  9.38E-01  4.42E+02  9.82E-01

 OMEGA - COV MATRIX FOR RANDOM EFFECTS - ETAS  ********
         ETA1      ETA2      ETA3      ETA4      ETA5      ETA6      ETA7      ETA8      ETA9      ET10      ET11      ET12
          ET13      ET14
 ETA1
+        1.27E-02
 ETA2
+        0.00E+00  3.36E-02
 ETA3
+        0.00E+00  0.00E+00  2.47E-03
 ETA4
+        0.00E+00  0.00E+00  0.00E+00  3.86E-03
 ETA5
+        0.00E+00  0.00E+00  0.00E+00  0.00E+00  3.59E-02
 ETA6
+        0.00E+00  0.00E+00  0.00E+00  0.00E+00  0.00E+00  2.32E-02
 ETA7
+        0.00E+00  0.00E+00  0.00E+00  0.00E+00  0.00E+00  0.00E+00  4.00E-03
 ETA8
+        0.00E+00  0.00E+00  0.00E+00  0.00E+00  0.00E+00  0.00E+00  0.00E+00  2.57E-02
 ETA9
+        0.00E+00  0.00E+00  0.00E+00  0.00E+00  0.00E+00  0.00E+00  0.00E+00  0.00E+00  6.50E-03
 ET10
+        0.00E+00  0.00E+00  0.00E+00  0.00E+00  0.00E+00  0.00E+00  0.00E+00  0.00E+00  0.00E+00  1.14E-02
 ET11
+        0.00E+00  0.00E+00  0.00E+00  0.00E+00  0.00E+00  0.00E+00  0.00E+00  0.00E+00  0.00E+00  0.00E+00  2.71E-02
 ET12
+        0.00E+00  0.00E+00  0.00E+00  0.00E+00  0.00E+00  0.00E+00  0.00E+00  0.00E+00  0.00E+00  0.00E+00  0.00E+00  1.21E-02
 ET13
+        0.00E+00  0.00E+00  0.00E+00  0.00E+00  0.00E+00  0.00E+00  0.00E+00  0.00E+00  0.00E+00  0.00E+00  0.00E+00  0.00E+00
          3.80E-03
 ET14
+        0.00E+00  0.00E+00  0.00E+00  0.00E+00  0.00E+00  0.00E+00  0.00E+00  0.00E+00  0.00E+00  0.00E+00  0.00E+00  0.00E+00
          0.00E+00  1.50E-03

 SIGMA - COV MATRIX FOR RANDOM EFFECTS - EPSILONS  ****
         EPS1      EPS2
 EPS1
+        2.31E-04
 EPS2
+        0.00E+00  1.77E+02

 OMEGA - CORR MATRIX FOR RANDOM EFFECTS - ETAS  *******
         ETA1      ETA2      ETA3      ETA4      ETA5      ETA6      ETA7      ETA8      ETA9      ET10      ET11      ET12
          ET13      ET14
 ETA1
+        1.13E-01
 ETA2
+        0.00E+00  1.83E-01
 ETA3
+        0.00E+00  0.00E+00  4.97E-02
 ETA4
+        0.00E+00  0.00E+00  0.00E+00  6.21E-02
 ETA5
+        0.00E+00  0.00E+00  0.00E+00  0.00E+00  1.89E-01
 ETA6
+        0.00E+00  0.00E+00  0.00E+00  0.00E+00  0.00E+00  1.52E-01
 ETA7
+        0.00E+00  0.00E+00  0.00E+00  0.00E+00  0.00E+00  0.00E+00  6.32E-02
 ETA8
+        0.00E+00  0.00E+00  0.00E+00  0.00E+00  0.00E+00  0.00E+00  0.00E+00  1.60E-01
 ETA9
+        0.00E+00  0.00E+00  0.00E+00  0.00E+00  0.00E+00  0.00E+00  0.00E+00  0.00E+00  8.06E-02
 ET10
+        0.00E+00  0.00E+00  0.00E+00  0.00E+00  0.00E+00  0.00E+00  0.00E+00  0.00E+00  0.00E+00  1.07E-01
 ET11
+        0.00E+00  0.00E+00  0.00E+00  0.00E+00  0.00E+00  0.00E+00  0.00E+00  0.00E+00  0.00E+00  0.00E+00  1.65E-01
 ET12
+        0.00E+00  0.00E+00  0.00E+00  0.00E+00  0.00E+00  0.00E+00  0.00E+00  0.00E+00  0.00E+00  0.00E+00  0.00E+00  1.10E-01
 ET13
+        0.00E+00  0.00E+00  0.00E+00  0.00E+00  0.00E+00  0.00E+00  0.00E+00  0.00E+00  0.00E+00  0.00E+00  0.00E+00  0.00E+00
          6.16E-02
 ET14
+        0.00E+00  0.00E+00  0.00E+00  0.00E+00  0.00E+00  0.00E+00  0.00E+00  0.00E+00  0.00E+00  0.00E+00  0.00E+00  0.00E+00
          0.00E+00  3.87E-02

 SIGMA - CORR MATRIX FOR RANDOM EFFECTS - EPSILONS  ***
         EPS1      EPS2
 EPS1
+        1.52E-02
 EPS2
+        0.00E+00  1.33E+01

 ********************               FIRST ORDER CONDITIONAL ESTIMATION WITH INTERACTION              ********************
 ********************                            STANDARD ERROR OF ESTIMATE                          ********************

 THETA - VECTOR OF FIXED EFFECTS PARAMETERS   *********
         TH 1      TH 2      TH 3      TH 4      TH 5      TH 6      TH 7      TH 8      TH 9      TH10      TH11      TH12
          TH13      TH14      TH15      TH16      TH17      TH18      TH19      TH20      TH21      TH22      TH23      TH24
         TH25      TH26      TH27      TH28
        ......... ......... ......... ......... ......... ......... ......... ......... ......... ......... ......... .........
         ......... ......... ......... ......... ......... ......... ......... ......... ......... ......... ......... .........
        ......... ......... ......... .........

 OMEGA - COV MATRIX FOR RANDOM EFFECTS - ETAS  ********
         ETA1      ETA2      ETA3      ETA4      ETA5      ETA6      ETA7      ETA8      ETA9      ET10      ET11      ET12
          ET13      ET14
 ETA1
+       .........
 ETA2
+       ......... .........
 ETA3
+       ......... ......... .........
 ETA4
+       ......... ......... ......... .........
 ETA5
+       ......... ......... ......... ......... .........
 ETA6
+       ......... ......... ......... ......... ......... .........
 ETA7
+       ......... ......... ......... ......... ......... ......... .........
 ETA8
+       ......... ......... ......... ......... ......... ......... ......... .........
 ETA9
+       ......... ......... ......... ......... ......... ......... ......... ......... .........
 ET10
+       ......... ......... ......... ......... ......... ......... ......... ......... ......... .........
 ET11
+       ......... ......... ......... ......... ......... ......... ......... ......... ......... ......... .........
 ET12
+       ......... ......... ......... ......... ......... ......... ......... ......... ......... ......... ......... .........
 ET13
+       ......... ......... ......... ......... ......... ......... ......... ......... ......... ......... ......... .........
         .........
 ET14
+       ......... ......... ......... ......... ......... ......... ......... ......... ......... ......... ......... .........
         ......... .........

 SIGMA - COV MATRIX FOR RANDOM EFFECTS - EPSILONS  ****
         EPS1      EPS2
 EPS1
+        4.01E-04
 EPS2
+       .........  3.43E+02

 OMEGA - CORR MATRIX FOR RANDOM EFFECTS - ETAS  *******
         ETA1      ETA2      ETA3      ETA4      ETA5      ETA6      ETA7      ETA8      ETA9      ET10      ET11      ET12
          ET13      ET14
 ETA1
+       .........
 ETA2
+       ......... .........
 ETA3
+       ......... ......... .........
 ETA4
+       ......... ......... ......... .........
 ETA5
+       ......... ......... ......... ......... .........
 ETA6
+       ......... ......... ......... ......... ......... .........
 ETA7
+       ......... ......... ......... ......... ......... ......... .........
 ETA8
+       ......... ......... ......... ......... ......... ......... ......... .........
 ETA9
+       ......... ......... ......... ......... ......... ......... ......... ......... .........
 ET10
+       ......... ......... ......... ......... ......... ......... ......... ......... ......... .........
 ET11
+       ......... ......... ......... ......... ......... ......... ......... ......... ......... ......... .........
 ET12
+       ......... ......... ......... ......... ......... ......... ......... ......... ......... ......... ......... .........
 ET13
+       ......... ......... ......... ......... ......... ......... ......... ......... ......... ......... ......... .........
         .........
 ET14
+       ......... ......... ......... ......... ......... ......... ......... ......... ......... ......... ......... .........
         ......... .........

 SIGMA - CORR MATRIX FOR RANDOM EFFECTS - EPSILONS  ***
         EPS1      EPS2
 EPS1
+        1.32E-02
 EPS2
+       .........  1.29E+01

 ********************               FIRST ORDER CONDITIONAL ESTIMATION WITH INTERACTION              ********************
 ********************                          COVARIANCE MATRIX OF ESTIMATE                         ********************

   SG0101 | SG0101  SG0202 | SG0101  SG0202 | SG0202
       1.61E-07        -1.20E-01         1.18E+05

 ********************               FIRST ORDER CONDITIONAL ESTIMATION WITH INTERACTION              ********************
 ********************                          CORRELATION MATRIX OF ESTIMATE                        ********************

   SG0101 | SG0101  SG0202 | SG0101  SG0202 | SG0202
       4.01E-04        -8.73E-01         3.43E+02
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 Elapsed finaloutput time in seconds:    13.04
 #CPUT: Total CPU Time in Seconds,    17946.422
